# Hexapod 2G
# Обратная задача кинематики
# Константы (длины звеньев)
# Точка назначения
# (координаты конца лапы)
OA := 37
AB := 44
BC := 83
Destination := [-57.276; -57.276; -83]
x := Destination[0] = -57.276
y := Destination[1] = -57.276  # Решение для задней левой лапы
z := Destination[2] = -83
p := sqrt(x^2 + y^2) = 81.0005
OC := sqrt(p^2 + z^2) = 115.974
AC := sqrt((p - OA)^2 + z^2) = 93.9417
Qrad := atan(z/(p - OA)) = -1.08334
Q0rad := acos((AB^2 + AC^2 - BC^2)/(2*AB*AC)) = 1.08334
q0rad := atan(y/x) + π = 3.92699
q1rad := Qrad + Q0rad = -3.36822e-11
q2rad := acos((AB^2 + BC^2 - AC^2)/(2*AB*BC)) = 1.5708
q0real := q0rad*180/π = 225
q1real := q1rad*180/π = -1.92985e-9
q2real := q2rad*180/π = 90.0003
q0 := q0real - 135 = 90
q1 := q1real + 90 = 90
q2 := q2real = 90.0003
Ap := OA
Bp := OA + AB*cos(q1rad) = 81
Cp := p = 81.0005
Ax := OA*cos(q0rad) = -26.163
Bx := Bp*cos(q0rad) = -57.2756
Cx := x = -57.276
Ay := OA*sin(q0rad) = -26.163
By := Bp*sin(q0rad) = -57.2756
Cy := y = -57.276
Az := 0
Bz := AB*sin(q1rad) = -1.48202e-9
Cz := z = -83
CoordX := [0; Ax; Bx; Cx] = [0; -26.163; -57.2756; -57.276]
CoordY := [0; Ay; By; Cy] = [0; -26.163; -57.2756; -57.276]
CoordZ := [0; Az; Bz; Cz] = [0; 0; -1.48202e-9; -83]
CoordP := [0; Ap; Bp; Cp] = [0; 37; 81; 81.0005]
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# Решение прямой задачи кинематики
q0 := 90
q0real := q0 + 135 = 225
q1 := 90
q1real := q1 - 90 = 0
q2 := 90
q2real := q2 = 90
q0rad := q0real*π/180 = 3.92699
q1rad := q1real*π/180 = 0
q0 := 90
q1 := 90
q2rad := q2real*π/180 = 1.5708
q2 := 90
Bp := OA + AB*cos(q1rad) = 81
Cp := Bp + BC*cos(π - q1rad - q2rad) = 81
Ap := OA = 37
Ax := Ap*cos(q0rad) = -26.163
Bx := Bp*cos(q0rad) = -57.2756
Cx := Cp*cos(q0rad) = -57.2756
Ay := Ap*sin(q0rad) = -26.163
By := Bp*sin(q0rad) = -57.2756
Cy := Cp*sin(q0rad) = -57.2756
Az := 0
Bz := AB*sin(q1rad) = 0
Cz := Bz - BC*sin(π - q1rad - q2rad) = -83
Cx = -57.2756
CoordY := [0; Ay; By; Cy] = [0; -26.163; -57.2756; -57.2756]
CoordX := [0; Ax; Bx; Cx] = [0; -26.163; -57.2756; -57.2756]
Cy = -57.2756
CoordZ := [0; Az; Bz; Cz] = [0; 0; 0; -83]
CoordP := [0; Ap; Bp; Cp] = [0; 37; 81; 81]
Cz = -83
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