# Hexapod 2G
# Обратная задача кинематики
# Константы (длины звеньев)
# Точка назначения
# (координаты конца лапы)
OA := 37
AB := 44
BC := 83
Destination := [57.276; 87.276; -50]
x := Destination[0] = 57.276
y := Destination[1] = 87.276
z := Destination[2] = -50  # Решение для передней правой лапы
p := sqrt(x^2 + y^2) = 104.392
OC := sqrt(p^2 + z^2) = 115.748
AC := sqrt((p - OA)^2 + z^2) = 83.9145
Qrad := atan(z/(p - OA)) = -0.638317
Q0rad := acos((AB^2 + AC^2 - BC^2)/(2*AB*AC)) = 1.28404
q0rad := atan(y/x) = 0.990031
q1rad := Qrad + Q0rad = 0.645723
q2rad := acos((AB^2 + BC^2 - AC^2)/(2*AB*BC)) = 1.32414
q0real := q0rad*180/π = 56.7246
q1real := q1rad*180/π = 36.9972
q2real := q2rad*180/π = 75.8678
q0 := q0real + 45 = 101.725
q1 := q1real + 90 = 126.997
q2 := q2real = 75.8678
Ap := OA
Bp := OA + AB*cos(q1rad) = 72.1413
Cp := p = 104.392
Ax := OA*cos(q0rad) = 20.3006
Bx := Bp*cos(q0rad) = 39.5813
Cx := x = 57.276
Ay := OA*sin(q0rad) = 30.9336
By := Bp*sin(q0rad) = 60.3132
Cy := y = 87.276
Az := 0
Bz := AB*sin(q1rad) = 26.4781
Cz := z = -50
CoordY := [0; Ay; By; Cy] = [0; 30.9336; 60.3132; 87.276]
CoordX := [0; Ax; Bx; Cx] = [0; 20.3006; 39.5813; 57.276]
CoordZ := [0; Az; Bz; Cz] = [0; 0; 26.4781; -50]
CoordP := [0; Ap; Bp; Cp] = [0; 37; 72.1413; 104.392]
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# Решение прямой задачи кинематики
q0 := 90
q1 := 90
q0real := q0 - 45 = 45
q2 := 90
q1real := q1 - 90 = 0
q2real := q2 = 90
q0rad := q0real*π/180 = 0.785398
q0 := 90
q1rad := q1real*π/180 = 0
q1 := 153.605
q2 := 45.519
q2rad := q2real*π/180 = 1.5708
Bp := OA + AB*cos(q1rad) = 81
Cp := Bp + BC*cos(π - q1rad - q2rad) = 81
Ap := OA = 37
Ax := Ap*cos(q0rad) = 26.163
Bx := Bp*cos(q0rad) = 57.2756
Cx := Cp*cos(q0rad) = 57.2756
Ay := Ap*sin(q0rad) = 26.163
By := Bp*sin(q0rad) = 57.2756
Cy := Cp*sin(q0rad) = 57.2756
Az := 0
Bz := AB*sin(q1rad) = 0
Cz := Bz - BC*sin(π - q1rad - q2rad) = -83
Cx = 57.2756
CoordY := [0; Ay; By; Cy] = [0; 26.163; 57.2756; 57.2756]
CoordX := [0; Ax; Bx; Cx] = [0; 26.163; 57.2756; 57.2756]
Cy = 57.2756
CoordZ := [0; Az; Bz; Cz] = [0; 0; 0; -83]
CoordP := [0; Ap; Bp; Cp] = [0; 37; 81; 81]
Cz = -83
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